# ---------- 1. Initialize simulation ---------------------
units metal
atom_style atomic
dimension  3
boundary   p p p
read_data /home/gridsan/epan1/labutil/lab1_samples/Problem2/Lab1/Ag_slab_sc121212_with_vac/lammps.data

# ---------- 2. Specify interatomic potential ---------------------
pair_style eam
pair_coeff * * /home/gridsan/epan1/3320_atomistic_shared/lammps/potentials/Ag_u3.eam

# pair_style lj/cut 4.5
# pair_coeff 1 1 0.3450 2.6244 4.5

# ---------- 3. Run single point calculation  ---------------------
thermo_style custom step pe lx ly lz press pxx pyy pzz
run 0

# -- include optimization of the unit cell parameter
fix 1 all box/relax iso 0.0 vmax 0.001

# -- enable optimization of atomic positions (and the cell)
min_style cg
minimize 1e-10 1e-10 10000 100000

# ---- 4. Define and print useful variables -------------
variable natoms equal "count(all)"
variable totenergy equal "pe"
variable length equal "lx"

print "Total energy (eV) = ${totenergy}"
print "Number of atoms = ${natoms}"
print "Lattice constant (Angstoms) = ${length}"
